Преобразование_BMP_в_матрицу_байт_для_дисплея(InData) :=
    InData ← InData/255
    row ← floor(rows(InData)/8)
    for x ∈ 0 .. cols(InData) - 1
        for y ∈ 0 .. row*8 - 1
            Data[x, y] ← InData[row*8 - 1 - y, x]
    for x ∈ 0 .. rows(Data) - 1
        for y ∈ 0 .. row - 1
            OutData[x, y] ← 1*Data[x, y*8 + 0] + 2*Data[x, y*8 + 1] + 4*Data[x, y*8 + 2] + 8*Data[x, y*8 + 3] + 16*Data[x, y*8 + 4] + 32*Data[x, y*8 + 5] + 64*Data[x, y*8 + 6] + 128*Data[x, y*8 + 7]
    return OutData
Преобразование_массива_с_картинкой_в_текст_для_вставки_в_файл(InData, имя_мяссива, описание) :=
    Data ← Преобразование_BMP_в_матрицу_байт_для_дисплея(InData)
    OutData[0] ← concat("//", описание)
    OutData[1] ← concat("unsigned char ", имя_мяссива, "[", num2str(rows(Data)), "][", num2str(cols(Data)), "]=")
    OutData[2] ← "  {"
    for x ∈ 0 .. rows(Data) - 1
        S ← "    {"
        for y ∈ 0 .. cols(Data) - 2
            S ← concat(S, num2str(Data[x, y]), ",")
        S ← concat(S, num2str(Data[x, cols(Data) - 1]), "},")
        OutData[x + 3] ← S
    OutData[rows(Data) + 3] ← "  };"
    return OutData
FileOut := [
    "//Файл содержит массивы с данными об изображениях, выводимых для вывода на различные области экрана";
    "//Экран разделен на 7 областей:";
    "//Регион №0 - центр экрана";
    "//Регион №1 - верхний левый угол";
    "//Регион №2 - верхняя центральная область";
    "//Регион №3 - верхний правый угол";
    "//Регион №4 - нижний левый угол";
    "//Регион №5 - нижняя центральная область";
    "//Регион №6 - нижний правый угол";
    "";
    "";
    ""
]
FileOut := stack(FileOut, "////////////////////////////////////////////////////////////////////////////", "////////////////////////       Весь экран         //////////////////////////", "////////////////////////////////////////////////////////////////////////////")
FileOut := stack(FileOut, Преобразование_массива_с_картинкой_в_текст_для_вставки_в_файл(READBMP("\Заставки\00.bmp"), "Region_All_img_00", "Вся область экрана, изображение 00"), "", "")
FileOut := stack(FileOut, Преобразование_массива_с_картинкой_в_текст_для_вставки_в_файл(READBMP("\Заставки\01.bmp"), "Region_All_img_01", "Вся область экрана, изображение 01"), "", "")
FileOut := stack(FileOut, Преобразование_массива_с_картинкой_в_текст_для_вставки_в_файл(READBMP("\Заставки\02.bmp"), "Region_All_img_02", "Вся область экрана, изображение 02"), "", "")
FileOut := stack(FileOut, Преобразование_массива_с_картинкой_в_текст_для_вставки_в_файл(READBMP("\Заставки\03.bmp"), "Region_All_img_03", "Вся область экрана, изображение 03"), "", "")
FileOut := stack(FileOut, "////////////////////////////////////////////////////////////////////////////", "////////////////////////          Регион 0        //////////////////////////", "////////////////////////////////////////////////////////////////////////////")
FileOut := stack(FileOut, Преобразование_массива_с_картинкой_в_текст_для_вставки_в_файл(READBMP("\Регион_0\00.bmp"), "Region_0_img_00", "Регион 0, изображение 00"), "", "")
FileOut := stack(FileOut, Преобразование_массива_с_картинкой_в_текст_для_вставки_в_файл(READBMP("\Регион_0\01.bmp"), "Region_0_img_01", "Регион 0, изображение 01"), "", "")
FileOut := stack(FileOut, Преобразование_массива_с_картинкой_в_текст_для_вставки_в_файл(READBMP("\Регион_0\02.bmp"), "Region_0_img_02", "Регион 0, изображение 02"), "", "")
FileOut := stack(FileOut, Преобразование_массива_с_картинкой_в_текст_для_вставки_в_файл(READBMP("\Регион_0\03.bmp"), "Region_0_img_03", "Регион 0, изображение 03"), "", "")
FileOut := stack(FileOut, Преобразование_массива_с_картинкой_в_текст_для_вставки_в_файл(READBMP("\Регион_0\04.bmp"), "Region_0_img_04", "Регион 0, изображение 04"), "", "")
FileOut := stack(FileOut, Преобразование_массива_с_картинкой_в_текст_для_вставки_в_файл(READBMP("\Регион_0\05.bmp"), "Region_0_img_05", "Регион 0, изображение 05"), "", "")
FileOut := stack(FileOut, Преобразование_массива_с_картинкой_в_текст_для_вставки_в_файл(READBMP("\Регион_0\06.bmp"), "Region_0_img_06", "Регион 0, изображение 06"), "", "")
FileOut := stack(FileOut, Преобразование_массива_с_картинкой_в_текст_для_вставки_в_файл(READBMP("\Регион_0\07.bmp"), "Region_0_img_07", "Регион 0, изображение 07"), "", "")
FileOut := stack(FileOut, Преобразование_массива_с_картинкой_в_текст_для_вставки_в_файл(READBMP("\Регион_0\08.bmp"), "Region_0_img_08", "Регион 0, изображение 08"), "", "")
FileOut := stack(FileOut, Преобразование_массива_с_картинкой_в_текст_для_вставки_в_файл(READBMP("\Регион_0\09.bmp"), "Region_0_img_09", "Регион 0, изображение 09"), "", "")
FileOut := stack(FileOut, Преобразование_массива_с_картинкой_в_текст_для_вставки_в_файл(READBMP("\Регион_0\10.bmp"), "Region_0_img_10", "Регион 0, изображение 10"), "", "")
FileOut := stack(FileOut, Преобразование_массива_с_картинкой_в_текст_для_вставки_в_файл(READBMP("\Регион_0\11.bmp"), "Region_0_img_11", "Регион 0, изображение 11"), "", "")
FileOut := stack(FileOut, Преобразование_массива_с_картинкой_в_текст_для_вставки_в_файл(READBMP("\Регион_0\12.bmp"), "Region_0_img_12", "Регион 0, изображение 12"), "", "")
FileOut := stack(FileOut, Преобразование_массива_с_картинкой_в_текст_для_вставки_в_файл(READBMP("\Регион_0\13.bmp"), "Region_0_img_13", "Регион 0, изображение 13"), "", "")
FileOut := stack(FileOut, Преобразование_массива_с_картинкой_в_текст_для_вставки_в_файл(READBMP("\Регион_0\14.bmp"), "Region_0_img_14", "Регион 0, изображение 14"), "", "")
FileOut := stack(FileOut, Преобразование_массива_с_картинкой_в_текст_для_вставки_в_файл(READBMP("\Регион_0\15.bmp"), "Region_0_img_15", "Регион 0, изображение 15"), "", "")
FileOut := stack(FileOut, Преобразование_массива_с_картинкой_в_текст_для_вставки_в_файл(READBMP("\Регион_0\16.bmp"), "Region_0_img_16", "Регион 0, изображение 16"), "", "")
FileOut := stack(FileOut, Преобразование_массива_с_картинкой_в_текст_для_вставки_в_файл(READBMP("\Регион_0\17.bmp"), "Region_0_img_17", "Регион 0, изображение 17"), "", "")
FileOut := stack(FileOut, Преобразование_массива_с_картинкой_в_текст_для_вставки_в_файл(READBMP("\Регион_0\18.bmp"), "Region_0_img_18", "Регион 0, изображение 18"), "", "")
FileOut := stack(FileOut, Преобразование_массива_с_картинкой_в_текст_для_вставки_в_файл(READBMP("\Регион_0\19.bmp"), "Region_0_img_19", "Регион 0, изображение 19"), "", "")
FileOut := stack(FileOut, Преобразование_массива_с_картинкой_в_текст_для_вставки_в_файл(READBMP("\Регион_0\20.bmp"), "Region_0_img_20", "Регион 0, изображение 20"), "", "")
FileOut := stack(FileOut, Преобразование_массива_с_картинкой_в_текст_для_вставки_в_файл(READBMP("\Регион_0\21.bmp"), "Region_0_img_21", "Регион 0, изображение 21"), "", "")
FileOut := stack(FileOut, Преобразование_массива_с_картинкой_в_текст_для_вставки_в_файл(READBMP("\Регион_0\22.bmp"), "Region_0_img_22", "Регион 0, изображение 22"), "", "")
FileOut := stack(FileOut, Преобразование_массива_с_картинкой_в_текст_для_вставки_в_файл(READBMP("\Регион_0\23.bmp"), "Region_0_img_23", "Регион 0, изображение 23"), "", "")
FileOut := stack(FileOut, Преобразование_массива_с_картинкой_в_текст_для_вставки_в_файл(READBMP("\Регион_0\24.bmp"), "Region_0_img_24", "Регион 0, изображение 24"), "", "")
FileOut := stack(FileOut, Преобразование_массива_с_картинкой_в_текст_для_вставки_в_файл(READBMP("\Регион_0\_Шрифт_01.bmp"), "Region_0_fnt_01", "Регион 0, шрифт 01"), "", "")
FileOut := stack(FileOut, Преобразование_массива_с_картинкой_в_текст_для_вставки_в_файл(READBMP("\Регион_0\_Шрифт_02.bmp"), "Region_0_fnt_02", "Регион 0, шрифт 02"), "", "")
FileOut := stack(FileOut, "////////////////////////////////////////////////////////////////////////////", "////////////////////////          Регион 1        //////////////////////////", "////////////////////////////////////////////////////////////////////////////")
FileOut := stack(FileOut, Преобразование_массива_с_картинкой_в_текст_для_вставки_в_файл(READBMP("\Регион_1\00.bmp"), "Region_1_img_00", "Регион 1, изображение 00"), "", "")
FileOut := stack(FileOut, Преобразование_массива_с_картинкой_в_текст_для_вставки_в_файл(READBMP("\Регион_1\01.bmp"), "Region_1_img_01", "Регион 1, изображение 01"), "", "")
FileOut := stack(FileOut, Преобразование_массива_с_картинкой_в_текст_для_вставки_в_файл(READBMP("\Регион_1\02.bmp"), "Region_1_img_02", "Регион 1, изображение 02"), "", "")
FileOut := stack(FileOut, Преобразование_массива_с_картинкой_в_текст_для_вставки_в_файл(READBMP("\Регион_1\03.bmp"), "Region_1_img_03", "Регион 1, изображение 03"), "", "")
FileOut := stack(FileOut, Преобразование_массива_с_картинкой_в_текст_для_вставки_в_файл(READBMP("\Регион_1\04.bmp"), "Region_1_img_04", "Регион 1, изображение 04"), "", "")
FileOut := stack(FileOut, Преобразование_массива_с_картинкой_в_текст_для_вставки_в_файл(READBMP("\Регион_1\05.bmp"), "Region_1_img_05", "Регион 1, изображение 05"), "", "")
FileOut := stack(FileOut, "////////////////////////////////////////////////////////////////////////////", "////////////////////////          Регион 2        //////////////////////////", "////////////////////////////////////////////////////////////////////////////")
FileOut := stack(FileOut, Преобразование_массива_с_картинкой_в_текст_для_вставки_в_файл(READBMP("\Регион_2\00.bmp"), "Region_2_img_00", "Регион 2, изображение 00"), "", "")
FileOut := stack(FileOut, Преобразование_массива_с_картинкой_в_текст_для_вставки_в_файл(READBMP("\Регион_2\01.bmp"), "Region_2_img_01", "Регион 2, изображение 01"), "", "")
FileOut := stack(FileOut, Преобразование_массива_с_картинкой_в_текст_для_вставки_в_файл(READBMP("\Регион_2\02.bmp"), "Region_2_img_02", "Регион 2, изображение 02"), "", "")
FileOut := stack(FileOut, Преобразование_массива_с_картинкой_в_текст_для_вставки_в_файл(READBMP("\Регион_2\03.bmp"), "Region_2_img_03", "Регион 2, изображение 03"), "", "")
FileOut := stack(FileOut, Преобразование_массива_с_картинкой_в_текст_для_вставки_в_файл(READBMP("\Регион_2\04.bmp"), "Region_2_img_04", "Регион 2, изображение 04"), "", "")
FileOut := stack(FileOut, Преобразование_массива_с_картинкой_в_текст_для_вставки_в_файл(READBMP("\Регион_2\05.bmp"), "Region_2_img_05", "Регион 2, изображение 05"), "", "")
FileOut := stack(FileOut, "////////////////////////////////////////////////////////////////////////////", "////////////////////////          Регион 3        //////////////////////////", "////////////////////////////////////////////////////////////////////////////")
FileOut := stack(FileOut, Преобразование_массива_с_картинкой_в_текст_для_вставки_в_файл(READBMP("\Регион_3\00.bmp"), "Region_3_img_00", "Регион 3, изображение 00"), "", "")
FileOut := stack(FileOut, Преобразование_массива_с_картинкой_в_текст_для_вставки_в_файл(READBMP("\Регион_3\01.bmp"), "Region_3_img_01", "Регион 3, изображение 01"), "", "")
FileOut := stack(FileOut, Преобразование_массива_с_картинкой_в_текст_для_вставки_в_файл(READBMP("\Регион_3\02.bmp"), "Region_3_img_02", "Регион 3, изображение 02"), "", "")
FileOut := stack(FileOut, Преобразование_массива_с_картинкой_в_текст_для_вставки_в_файл(READBMP("\Регион_3\03.bmp"), "Region_3_img_03", "Регион 3, изображение 03"), "", "")
FileOut := stack(FileOut, Преобразование_массива_с_картинкой_в_текст_для_вставки_в_файл(READBMP("\Регион_3\04.bmp"), "Region_3_img_04", "Регион 3, изображение 04"), "", "")
FileOut := stack(FileOut, Преобразование_массива_с_картинкой_в_текст_для_вставки_в_файл(READBMP("\Регион_3\05.bmp"), "Region_3_img_05", "Регион 3, изображение 05"), "", "")
FileOut := stack(FileOut, "////////////////////////////////////////////////////////////////////////////", "////////////////////////          Регион 4        //////////////////////////", "////////////////////////////////////////////////////////////////////////////")
FileOut := stack(FileOut, Преобразование_массива_с_картинкой_в_текст_для_вставки_в_файл(READBMP("\Регион_4\00.bmp"), "Region_4_img_00", "Регион 4, изображение 00"), "", "")
FileOut := stack(FileOut, Преобразование_массива_с_картинкой_в_текст_для_вставки_в_файл(READBMP("\Регион_4\01.bmp"), "Region_4_img_01", "Регион 4, изображение 01"), "", "")
FileOut := stack(FileOut, Преобразование_массива_с_картинкой_в_текст_для_вставки_в_файл(READBMP("\Регион_4\02.bmp"), "Region_4_img_02", "Регион 4, изображение 02"), "", "")
FileOut := stack(FileOut, Преобразование_массива_с_картинкой_в_текст_для_вставки_в_файл(READBMP("\Регион_4\03.bmp"), "Region_4_img_03", "Регион 4, изображение 03"), "", "")
FileOut := stack(FileOut, Преобразование_массива_с_картинкой_в_текст_для_вставки_в_файл(READBMP("\Регион_4\04.bmp"), "Region_4_img_04", "Регион 4, изображение 04"), "", "")
FileOut := stack(FileOut, Преобразование_массива_с_картинкой_в_текст_для_вставки_в_файл(READBMP("\Регион_4\05.bmp"), "Region_4_img_05", "Регион 4, изображение 05"), "", "")
FileOut := stack(FileOut, Преобразование_массива_с_картинкой_в_текст_для_вставки_в_файл(READBMP("\Регион_4\06.bmp"), "Region_4_img_06", "Регион 4, изображение 06"), "", "")
FileOut := stack(FileOut, Преобразование_массива_с_картинкой_в_текст_для_вставки_в_файл(READBMP("\Регион_4\07.bmp"), "Region_4_img_07", "Регион 4, изображение 07"), "", "")
FileOut := stack(FileOut, Преобразование_массива_с_картинкой_в_текст_для_вставки_в_файл(READBMP("\Регион_4\08.bmp"), "Region_4_img_08", "Регион 4, изображение 08"), "", "")
FileOut := stack(FileOut, "////////////////////////////////////////////////////////////////////////////", "////////////////////////          Регион 5        //////////////////////////", "////////////////////////////////////////////////////////////////////////////")
FileOut := stack(FileOut, Преобразование_массива_с_картинкой_в_текст_для_вставки_в_файл(READBMP("\Регион_5\00.bmp"), "Region_5_img_00", "Регион 5, изображение 00"), "", "")
FileOut := stack(FileOut, Преобразование_массива_с_картинкой_в_текст_для_вставки_в_файл(READBMP("\Регион_5\01.bmp"), "Region_5_img_01", "Регион 5, изображение 01"), "", "")
FileOut := stack(FileOut, Преобразование_массива_с_картинкой_в_текст_для_вставки_в_файл(READBMP("\Регион_5\02.bmp"), "Region_5_img_02", "Регион 5, изображение 02"), "", "")
FileOut := stack(FileOut, Преобразование_массива_с_картинкой_в_текст_для_вставки_в_файл(READBMP("\Регион_5\_Шрифт_01.bmp"), "Region_5_fnt_01", "Регион 5, шрифт 01"), "", "")
FileOut := stack(FileOut, "////////////////////////////////////////////////////////////////////////////", "////////////////////////          Регион 6        //////////////////////////", "////////////////////////////////////////////////////////////////////////////")
FileOut := stack(FileOut, Преобразование_массива_с_картинкой_в_текст_для_вставки_в_файл(READBMP("\Регион_6\00.bmp"), "Region_6_img_00", "Регион 6, изображение 00"), "", "")
FileOut := stack(FileOut, Преобразование_массива_с_картинкой_в_текст_для_вставки_в_файл(READBMP("\Регион_6\01.bmp"), "Region_6_img_01", "Регион 6, изображение 01"), "", "")
FileOut := stack(FileOut, Преобразование_массива_с_картинкой_в_текст_для_вставки_в_файл(READBMP("\Регион_6\02.bmp"), "Region_6_img_02", "Регион 6, изображение 02"), "", "")
FileOut := stack(FileOut, Преобразование_массива_с_картинкой_в_текст_для_вставки_в_файл(READBMP("\Регион_6\03.bmp"), "Region_6_img_03", "Регион 6, изображение 03"), "", "")
# [component: inputs FileOut]
